# OpenSim document version 40000
InverseKinematicsTool:
  results_directory: ./
  constraint_weight: Inf
  accuracy: 1e-5
  report_errors: true
  output_motion_file: C:\Users\MoyaEstebanA\Desktop\Pilots\Walking - 220819\c3d_data\ElaboratedData\Dynamic\dynamicElaborations\dynamicElaboration\WalkConfort2\IK_output.mot
  report_marker_locations: false
  IKTaskSet:
    IKMarkerTask C7: apply=true weight=1
    IKMarkerTask RACR: apply=true weight=1
    IKMarkerTask LACR: apply=true weight=1
    IKMarkerTask CLAV: apply=true weight=1
    IKMarkerTask SACR: apply=true weight=1
    IKMarkerTask RASI: apply=true weight=1
    IKMarkerTask LASI: apply=true weight=1
    IKMarkerTask RT3: apply=true weight=1
    IKMarkerTask RT2: apply=true weight=1
    IKMarkerTask RT1: apply=true weight=1
    IKMarkerTask LT2: apply=true weight=1
    IKMarkerTask LT3: apply=true weight=1
    IKMarkerTask LT1: apply=true weight=1
    IKMarkerTask RLFE: apply=false weight=1
    IKMarkerTask LLFE: apply=false weight=1
    IKMarkerTask RMFE: apply=false weight=1
    IKMarkerTask LMFE: apply=false weight=1
    IKMarkerTask RLM: apply=false weight=1
    IKMarkerTask LLM: apply=false weight=1
    IKMarkerTask RMM: apply=false weight=1
    IKMarkerTask LMM: apply=false weight=1
    IKMarkerTask RCAL: apply=true weight=1
    IKMarkerTask LCAL: apply=true weight=1
    IKMarkerTask R1MT: apply=true weight=1
    IKMarkerTask L1MT: apply=true weight=1
    IKMarkerTask R5MT: apply=true weight=1
    IKMarkerTask L5MT: apply=true weight=1
    IKMarkerTask RS1: apply=true weight=1
    IKMarkerTask LS1: apply=true weight=1
    IKMarkerTask RS2: apply=true weight=1
    IKMarkerTask LS2: apply=true weight=1
    IKMarkerTask RS3: apply=true weight=1
    IKMarkerTask LS3: apply=true weight=1
    IKMarkerTask RTRC: apply=false weight=1
    IKMarkerTask LTRC: apply=false weight=1
