# OpenSim document version 40000
InverseKinematicsTool D:\HuaweiWang\LumbarJnt_BU_TD_Comp\SubjData_BottomUp\OS\DataFiles\SubjData_BottomUpwalk_36.trc:
  results_directory: ./
  model_file: D:\HuaweiWang\LumbarJnt_BU_TD_Comp\SubjData_BottomUp\OS\UTmodel\gait2392_simbody_subj06_scaled_1.osim
  constraint_weight: Inf
  accuracy: 1e-5
  marker_file: D:\HuaweiWang\LumbarJnt_BU_TD_Comp\SubjData_BottomUp\OS\DataFiles\SubjData_BottomUpwalk_36.trc
  time_range: 0 60.96
  report_errors: true
  output_motion_file: D:\HuaweiWang\LumbarJnt_BU_TD_Comp\SubjData_BottomUp\OS\DataFiles\SubjData_BottomUpwalk_36IK.mot
  report_marker_locations: false
  IKTaskSet:
    IKMarkerTask C7: apply=true weight=1
    IKMarkerTask RACR: apply=true weight=1
    IKMarkerTask LACR: apply=true weight=1
    IKMarkerTask CLAV: apply=true weight=1
    IKMarkerTask SACR: apply=true weight=1
    IKMarkerTask RASI: apply=true weight=1
    IKMarkerTask LASI: apply=true weight=1
    IKMarkerTask RT3: apply=true weight=1
    IKMarkerTask RT2: apply=true weight=1
    IKMarkerTask RT1: apply=true weight=1
    IKMarkerTask LT2: apply=true weight=1
    IKMarkerTask LT3: apply=true weight=1
    IKMarkerTask LT1: apply=true weight=1
    IKMarkerTask RLFE: apply=false weight=1
    IKMarkerTask LLFE: apply=false weight=1
    IKMarkerTask RMFE: apply=false weight=1
    IKMarkerTask LMFE: apply=false weight=1
    IKMarkerTask RLM: apply=false weight=1
    IKMarkerTask LLM: apply=false weight=1
    IKMarkerTask RMM: apply=false weight=1
    IKMarkerTask LMM: apply=false weight=1
    IKMarkerTask RCAL: apply=true weight=1
    IKMarkerTask LCAL: apply=true weight=1
    IKMarkerTask R1MT: apply=true weight=1
    IKMarkerTask L1MT: apply=true weight=1
    IKMarkerTask R5MT: apply=true weight=1
    IKMarkerTask L5MT: apply=true weight=1
    IKMarkerTask RS1: apply=true weight=1
    IKMarkerTask LS1: apply=true weight=1
    IKMarkerTask RS2: apply=true weight=1
    IKMarkerTask LS2: apply=true weight=1
    IKMarkerTask RS3: apply=true weight=1
    IKMarkerTask LS3: apply=true weight=1
    IKMarkerTask RTRC: apply=false weight=1
    IKMarkerTask LTRC: apply=false weight=1
