# OpenSim document version 40000
ScaleTool 3DGaitModel2392_scaled:
  mass: 56 [kg]
  height: -1
  age: -1
  ModelScaler:
    apply: true
    scaling_order: measurements
    marker_file: ../Subj06static_pose.trc
    time_range: 3 8
    preserve_mass_distribution: false
    MeasurementSet:
      Measurement Pelvis_x: apply=true
        MarkerPair: markers=(RASI SACR)
        MarkerPair: markers=(LASI SACR)
        BodyScale pelvis: axes=X
      Measurement Pelvis_y: apply=true
        MarkerPair: markers=(LASI LLFE)
        MarkerPair: markers=(RASI RLFE)
        MarkerPair: markers=(LASI LMFE)
        MarkerPair: markers=(RASI RMFE)
        BodyScale pelvis: axes=Y
      Measurement Pelvis_z: apply=true
        MarkerPair: markers=(RASI LASI)
        MarkerPair: markers=(LASI SACR)
        MarkerPair: markers=(RASI SACR)
        BodyScale pelvis: axes=Z
      Measurement Rfemur_y: apply=true
        MarkerPair: markers=(RASI RLFE)
        MarkerPair: markers=(RASI RMFE)
        BodyScale femur_r: axes=Y
      Measurement Rfemur_z: apply=true
        MarkerPair: markers=(RMFE RLFE)
        BodyScale femur_r: axes=(X Z)
      Measurement Lfemur_y: apply=true
        MarkerPair: markers=(LASI LLFE)
        MarkerPair: markers=(LASI LMFE)
        BodyScale femur_l: axes=Y
      Measurement Lfemur_z: apply=true
        MarkerPair: markers=(LMFE LLFE)
        BodyScale femur_l: axes=(X Z)
      Measurement Rtibia_y: apply=true
        MarkerPair: markers=(RMFE RMM)
        MarkerPair: markers=(RLFE RLM)
        BodyScale tibia_r: axes=Y
      Measurement Rtibia_z: apply=true
        MarkerPair: markers=(RMM RLM)
        BodyScale tibia_r: axes=(X Z)
      Measurement Ltibia_y: apply=true
        MarkerPair: markers=(LMFE LMM)
        MarkerPair: markers=(LLFE LLM)
        BodyScale tibia_l: axes=Y
      Measurement Ltibia_z: apply=true
        MarkerPair: markers=(LMM LLM)
        BodyScale tibia_l: axes=(X Z)
      Measurement Rfoot_x: apply=true
        MarkerPair: markers=(RCAL R1MT)
        MarkerPair: markers=(RCAL R5MT)
        BodyScale talus_r: axes=(X Y)
        BodyScale calcn_r: axes=(X Y)
        BodyScale toes_r: axes=(X Y)
      Measurement Rfoot_z: apply=true
        MarkerPair: markers=(R1MT R5MT)
        BodyScale talus_r: axes=Z
        BodyScale calcn_r: axes=Z
        BodyScale toes_r: axes=Z
      Measurement Lfoot_x: apply=true
        MarkerPair: markers=(LCAL L1MT)
        MarkerPair: markers=(LCAL L5MT)
        BodyScale talus_l: axes=(X Y)
        BodyScale calcn_l: axes=(X Y)
        BodyScale toes_l: axes=(X Y)
      Measurement Lfoot_z: apply=true
        MarkerPair: markers=(L1MT L5MT)
        BodyScale talus_l: axes=Z
        BodyScale calcn_l: axes=Z
        BodyScale toes_l: axes=Z
      Measurement Torso: apply=true
        MarkerPair: markers=(LACR RACR)
        MarkerPair: markers=(LASI RASI)
        BodyScale torso: axes=(X Y Z)
  MarkerPlacer:
    apply: true
    marker_file: ../Subj06static_pose.trc
    time_range: 3 8
    max_marker_movement: -1
    IKTaskSet:
      IKMarkerTask C7: apply=true weight=1
      IKMarkerTask RACR: apply=true weight=1
      IKMarkerTask LACR: apply=true weight=1
      IKMarkerTask CLAV: apply=true weight=1
      IKMarkerTask SACR: apply=true weight=1
      IKMarkerTask RASI: apply=true weight=1
      IKMarkerTask LASI: apply=true weight=1
      IKMarkerTask RLFE: apply=true weight=0
      IKMarkerTask LLFE: apply=true weight=0
      IKMarkerTask RMFE: apply=true weight=1
      IKMarkerTask LMFE: apply=true weight=1
      IKMarkerTask RLM: apply=true weight=1
      IKMarkerTask LLM: apply=true weight=1
      IKMarkerTask RMM: apply=true weight=1
      IKMarkerTask LMM: apply=true weight=1
      IKMarkerTask RCAL: apply=true weight=1
      IKMarkerTask LCAL: apply=true weight=1
      IKMarkerTask R1MT: apply=true weight=1
      IKMarkerTask L1MT: apply=true weight=1
      IKMarkerTask R5MT: apply=true weight=1
      IKMarkerTask L5MT: apply=true weight=1
      IKCoordinateTask pelvis_tilt: apply=true weight=0.1 value_type=default_value value=0
      IKCoordinateTask pelvis_list: apply=true weight=1 value_type=default_value value=0
      IKCoordinateTask pelvis_rotation: apply=true weight=1 value_type=default_value value=0
      IKCoordinateTask hip_flexion_r: apply=true weight=0.5 value_type=manual_value value=-0.02268928
      IKCoordinateTask knee_angle_r: apply=true weight=0.5 value_type=manual_value value=-0.04363323
      IKCoordinateTask ankle_angle_r: apply=true weight=0.5 value_type=manual_value value=0.1090831
      IKCoordinateTask hip_flexion_l: apply=true weight=0.5 value_type=manual_value value=-0.01745329
      IKCoordinateTask knee_angle_l: apply=true weight=0.5 value_type=manual_value value=-0.03839724
      IKCoordinateTask ankle_angle_l: apply=true weight=0.5 value_type=manual_value value=0.09599311
